# OpenSim document version 40000
Model block_drag:
  gravity: -3.355 -9.21 0
  credits: Krueger
  length_units: m
  force_units: N
  publications:
    D. Krüger and S. Wartzack, “A contact model to simulate human–artifact interaction based on force optimization: implementation and application to the analysis of a training machine,” Computer Methods in Biomechanics and Biomedical Engineering, pp. 1–10, Oct. 2017, DOI:10.1080/10255842.2017.1393804
  Ground: meshes=checkered_floor.vtp
  BodySet:
    Body block: mass=1 [kg] mass_center=(0 0 0) inertia=(0.166 0.166 0.166 0 0 0) meshes=big_block_centered.vtp
  JointSet:
    CustomJoint root: socket_parent_frame=ground_offset socket_child_frame=block_offset
      Coordinate root_rx: default_value=-8.557951e-19 range=(-1.570796 1.570796) clamped=false locked=true
      Coordinate root_ry: default_value=1.261755e-33 range=(-1.570796 1.570796) clamped=false locked=true
      Coordinate root_rz: default_value=1.121267e-5 range=(-1.570796 1.570796) clamped=false
      Coordinate root_tx: default_value=0.0004724749 range=(-5 5) clamped=false
      Coordinate root_ty: default_value=0.0999955 range=(-1 2) clamped=false
      Coordinate root_tz: default_value=9.65181e-19 range=(-3 3) clamped=false locked=true
      PhysicalOffsetFrame ground_offset: socket_parent=/ground translation=(0 0 0) [meters]
      PhysicalOffsetFrame block_offset: socket_parent=/bodyset/block translation=(0 0 0)
      SpatialTransform:
        TransformAxis rotation1: coordinates=root_rx axis=(1 0 0) LinearFunction(coefficients=1 0)
        TransformAxis rotation2: coordinates=root_ry axis=(0 1 0) LinearFunction(coefficients=1 0)
        TransformAxis rotation3: coordinates=root_rz axis=(0 0 1) LinearFunction(coefficients=1 0)
        TransformAxis translation1: coordinates=root_tx axis=(1 0 0) LinearFunction(coefficients=1 0)
        TransformAxis translation2: coordinates=root_ty axis=(0 1 0) LinearFunction(coefficients=1 0)
        TransformAxis translation3: coordinates=root_tz axis=(0 0 1) LinearFunction(coefficients=1 0)
  ForceSet:
    PointActuator drag_actuator: min_control=0 max_control=1000000 body=block point=(0.1 -0.1 0) point_is_global=false
        direction=(1 0 0) force_is_global=true optimal_force=5
    CoordinateActuator rz: min_control=-1000 max_control=1000 coordinate=root_rz optimal_force=0.001
    CoordinateActuator tx: min_control=-1000 max_control=1000 coordinate=root_tx optimal_force=0.001
    CoordinateActuator ty: min_control=-1000 max_control=1000 coordinate=root_ty optimal_force=0.001
    ContactPointOnPlane contact_1: optimal_force=10 static_friction=0.5 kinetic_friction=0.4 contact_tolerance=-1
        contact_transition_zone=0.1 v_trans=0.001 plane_body=ground plane_origin=(0 0 0) plane_normal=(0 1 0)
        point_body=block point_location=(-0.1 -0.1 0)
    ContactPointOnPlane contact_2: optimal_force=10 static_friction=0.5 kinetic_friction=0.4 contact_tolerance=-1
        contact_transition_zone=0.1 v_trans=0.001 plane_body=ground plane_origin=(0 0 0) plane_normal=(0 1 0)
        point_body=block point_location=(0.1 -0.1 0)
  MarkerSet:
    Marker contact_point_1: block (-0.1 -0.09 0)
    Marker contact_point_2: block (0.1 -0.09 0)
