# OpenSim document version 40000
ExternalLoads:
  datafile: block_drag_ContactForceAnalysis_externalForces.sto
  lowpass_cutoff_frequency_for_load_kinematics: -1
  ExternalForce contact_1_on_block: applied_to_body=block force_expressed_in_body=ground point_expressed_in_body=ground
      force_identifier=contact_1_on_block_v point_identifier=contact_1_on_block_p
      torque_identifier=contact_1_on_block_t
  ExternalForce contact_1_on_ground: applied_to_body=ground force_expressed_in_body=ground
      point_expressed_in_body=ground force_identifier=contact_1_on_ground_v point_identifier=contact_1_on_ground_p
      torque_identifier=contact_1_on_ground_t
  ExternalForce contact_2_on_block: applied_to_body=block force_expressed_in_body=ground point_expressed_in_body=ground
      force_identifier=contact_2_on_block_v point_identifier=contact_2_on_block_p
      torque_identifier=contact_2_on_block_t
  ExternalForce contact_2_on_ground: applied_to_body=ground force_expressed_in_body=ground
      point_expressed_in_body=ground force_identifier=contact_2_on_ground_v point_identifier=contact_2_on_ground_p
      torque_identifier=contact_2_on_ground_t
