# OpenSim document version 40000
AnalyzeTool model_generic:
  model_file: /Users/artur/Documents/GitHub/groundForceReaction/src/model_generic.osim
  replace_force_set: false
  force_set_files: models/reserve_actuators.xml
  results_directory: /Users/artur/Documents/GitHub/groundForceReaction/src/results
  output_precision: 8
  initial_time: 0
  final_time: 2.5
  solve_for_equilibrium_for_auxiliary_states: false
  maximum_number_of_integrator_steps: 20000
  maximum_integrator_step_size: 1
  minimum_integrator_step_size: 1e-8
  integrator_error_tolerance: 1e-5
  coordinates_file: motions/task_InverseKinematics.mot
  lowpass_cutoff_frequency_for_coordinates: 6
  AnalysisSet Analyses:
    ContactForceAnalysis: consider_muscle_physiology=true report_external_forces=true start_time=0 end_time=2.5
        step_interval=10 in_degrees=true
